<?xml version="1.0"?>
<Node name="root" dt="0.02">
      <RequiredPlugin name="Sofa.Component.Collision.Detection.Algorithm"/> <!-- Needed to use components [DefaultPipeline] -->
      <RequiredPlugin name="Sofa.Component.Collision.Detection.Intersection"/> <!-- Needed to use components [MinProximityIntersection] -->
      <RequiredPlugin name="Sofa.Component.Collision.Geometry"/> <!-- Needed to use components [LineCollisionModel, PointCollisionModel, TriangleCollisionModel] -->
      <RequiredPlugin name="Sofa.Component.Collision.Response.Contact"/> <!-- Needed to use components [DefaultContactManager] -->
      <RequiredPlugin name="Sofa.Component.IO.Mesh"/> <!-- Needed to use components [MeshOBJLoader] -->
      <RequiredPlugin name="Sofa.Component.LinearSolver.Iterative"/> <!-- Needed to use components [CGLinearSolver] -->
      <RequiredPlugin name="Sofa.Component.Mapping.Linear"/> <!-- Needed to use components [SubsetMapping] -->
      <RequiredPlugin name="Sofa.Component.Mass"/> <!-- Needed to use components [UniformMass] -->
      <RequiredPlugin name="Sofa.Component.ODESolver.Backward"/> <!-- Needed to use components [EulerImplicitSolver] -->
      <RequiredPlugin name="Sofa.Component.SceneUtility"/> <!-- Needed to use components [InfoComponent] -->
      <RequiredPlugin name="Sofa.Component.SolidMechanics.FEM.Elastic"/> <!-- Needed to use components [TetrahedronFEMForceField] -->
      <RequiredPlugin name="Sofa.Component.StateContainer"/> <!-- Needed to use components [MechanicalObject] -->
      <RequiredPlugin name="Sofa.Component.Topology.Container.Constant"/> <!-- Needed to use components [MeshTopology] -->
      <RequiredPlugin name="Sofa.Component.Topology.Container.Grid"/> <!-- Needed to use components [RegularGridTopology] -->
      <RequiredPlugin name="Sofa.Component.Visual"/> <!-- Needed to use components [VisualStyle] -->
      <RequiredPlugin name="Sofa.GL.Component.Rendering3D"/> <!-- Needed to use components [OglModel] -->
      <RequiredPlugin name="THMPGSpatialHashing"/>

      <VisualStyle displayFlags="showBehaviorModels showForceFields" />
      <DefaultPipeline verbose="0" draw="0" />

        <!--
         THMPGSpatialHashing must be placed near a collision pipeline.
         Here DefaultPipeline.
     -->
     <THMPGSpatialHashing name="spatialHashing" />

     <MinProximityIntersection name="Proximity" alarmDistance="0.8" contactDistance="0.5" />
     <DefaultContactManager name="Response" response="PenalityContactForceField" />
     <Node name="cubeFEM">
        <EulerImplicitSolver name="cg_odesolver" printLog="false"  rayleighStiffness="0.1" rayleighMass="0.1" />
        <CGLinearSolver iterations="25" name="linear solver" tolerance="1.0e-9" threshold="1.0e-9" />
        <MechanicalObject />
        <UniformMass vertexMass="0.25" />
        <RegularGridTopology nx="5" ny="5" nz="5" xmin="-3.5" xmax="3.5" ymin="-3.5" ymax="3.5" zmin="-3.5" zmax="3.5" />
        <TetrahedronFEMForceField name="FEM" youngModulus="25" poissonRatio="0.3" computeGlobalMatrix="false" updateStiffnessMatrix="false" method="large" />
        <Node name="Visu">
            <MeshOBJLoader name="meshLoader_0" filename="mesh/smCube125.obj" handleSeams="1" />
            <OglModel name="Visual" src="@meshLoader_0" color="red" />
            <SubsetMapping input="@.." output="@Visual" />
        </Node>
        <Node name="Surf">
            <MeshOBJLoader name="loader" filename="mesh/smCube125.obj" />
            <MeshTopology src="@loader" />
            <MechanicalObject src="@loader" />
            <TriangleCollisionModel />
            <LineCollisionModel />
            <PointCollisionModel />
            <SubsetMapping />
        </Node>
    </Node>
    <Node name="Floor">
        <MeshOBJLoader name="loader" filename="mesh/floor3.obj" />
        <MeshTopology src="@loader" />
        <MechanicalObject src="@loader" dy="-10" scale="1.75" />
        <TriangleCollisionModel name="FloorTriangle" simulated="0" moving="0" />
        <LineCollisionModel name="FloorLine" simulated="0" moving="0" />
        <PointCollisionModel name="FloorPoint" simulated="0" moving="0" />
        <MeshOBJLoader name="meshLoader_1" filename="mesh/floor3.obj" scale="1.75" handleSeams="1" />
        <OglModel name="FloorV" src="@meshLoader_1" texturename="textures/brushed_metal.bmp" dy="-10" />
    </Node>
</Node>
